# AERO 481 - Team 2 - jetMaize LLC.
# jetMaize Preliminary Design
# Last Revision: 11/3/17

#==============================================================
#-------------------------GEOMETRY FILE------------------------
#==============================================================
# AVL Conventions
# Imperial Used: ft, lbm, etc.

# Case title
jetMaize

# Mach
0.85

# iYsim iZym Zsym
0 0 0

# Sref Creb Bref
1060.08869 14.63255 92.027559

# Xcg Ycg Zcg
51.44619 0 0

# CDp (optional)
0.0


# #==============================================================
# #---------------------------FUSELAGE---------------------------
# #==============================================================


# BODY
# Fuselage
# 80   1.0

# YDUPLICATE
# 0.0


# SCALE
# 105.17 105.17 105.17

# TRANSLATE
# 0.0  0.0  0.1


# BFILE
# j481fuse.dat


# SURFACE
# HFuselage

# 13 1.00


# YDUPLICATE
# 0.0


# SCALE
# 1.0 1.0 1.0


# ANGLE
# 0


# TRANSLATE
# 0.0 0.0 0.0


# SECTION
# # Xle Yle Zle Chord Ainc [ Nspan Sspace ]
# 3 0 -2.16535 61 0.000 3 3
# NACA
# 0008
# CLAF
# 1.1078


# SECTION
# # Xle Yle Zle Chord Ainc [ Nspan Sspace ]
# 10.9592 2.82152 -2.16535 51.21 0.000 3 3
# NACA
# 0008
# CLAF
# 1.1078


# SURFACE
# VFuselage

# 13 1.00


# SCALE
# 1.0 1.0 1.0


# ANGLE
# 0


# TRANSLATE
# 0.0 0.0 0.0


# SECTION
# # Xle Yle Zle Chord Ainc [ Nspan Sspace ]
# 10 0 -3.16535 51 0.000 3 3
# NACA
# 0008
# CLAF
# 1.1078

# SECTION
# # Xle Yle Zle Chord Ainc [ Nspan Sspace ]
# 0 0 0 83 0.000 3 3
# NACA
# 0008
# CLAF
# 1.1078

# SECTION
# # Xle Yle Zle Chord Ainc [ Nspan Sspace ]
# 10.9592 0 5.8727 91.21 0.000 3 3
# NACA
# 0008
# CLAF
# 1.1078

#==============================================================
#-----------------------------CANARD---------------------------
#==============================================================
SURFACE
Canard

# Nchord Cspace [ Nspan Sspace ]
6 1.00


YDUPLICATE
0.0


SCALE
1.0 1.0 1.0


ANGLE
0


TRANSLATE
0.0 0.0 0.0


# #ROOT CHORD WITH 50% HINGE (FUSELAGE EFFECT IGNORED)
# SECTION
# # Xle Yle Zle Chord Ainc [ Nspan Sspace ]
# 10.9592 0.0 -0.73 7 0.000 3 3
# NACA
# 0008
# CLAF
# 1.1078

# #ROOT CHORD WITH 50% HINGE (FUSELAGE EFFECT IGNORED)
# SECTION
# # Xle Yle Zle Chord Ainc [ Nspan Sspace ]
# 10.9592 3.5 -0.73 7 0.000 1 3
# NACA
# 0008
# CLAF
# 1.1078


# outside fuse


#ROOT CHORD WITH 50% HINGE (FUSELAGE EFFECT ACCOUNTED)
SECTION
# Xle Yle Zle Chord Ainc [ Nspan Sspace ]
10.9592 0.0 -0.73 7 2 8 3
AFILE
sc20612-il.dat

CONTROL
# name gain Xhinge VYZhvec SgnDup
Canard -1.00 0.0 0 1 0 1.00

# CONTROL
# # name gain Xhinge VYZhvec SgnDup
# Flap 1.00 0.70 0 0 0 1.00


#TIP CHORD WITH 50% HINGE
SECTION
# Xle Yle Zle Chord Ainc [ Nspan Sspace ]
18.7808 16.9 -0.984252 3 2 8 3
AFILE
sc20612-il.dat


CONTROL
# name gain Xhinge VYZhvec SgnDup
Canard 1.00 0.0   0 1 0    1.00

# CONTROL
# # name gain Xhinge VYZhvec SgnDup
# Flap 1.00 0.70 0 0 0 1.00


#==============================================================
#---------------------------MAIN WING--------------------------
#==============================================================
SURFACE
Main Wing

# Nchord Cspace [ Nspan Sspace ]
13 1.00


INDEX
6440


YDUPLICATE
0.0


SCALE
1.0 1.0 1.0


ANGLE
2.500


TRANSLATE
0.0 0.0 0.0


# SECTION
# # Xle Yle Zle Chord Ainc [ Nspan Sspace ]
# 5 0 -2.16535 61 2.00 2 3
# NACA
# 0008
# CLAF
# 1.1078


# SECTION
# # Xle Yle Zle Chord Ainc [ Nspan Sspace ]
# 10.9592 2. -2.16535 51.21 3 1 3
# NACA
# 0008
# CLAF
# 1.1078


#WING WITH FUSELAGE EFFECT ACCOUNTED: AFFECTS EFFICIENCY CALCULATIONS
#ROOT CHORD
SECTION
# Xle Yle Zle Chord Ainc [ Nspan Sspace ]
41.8333 0 -2.16535 15.0591 4 6 3

AFILE
sc20612-il.dat

##ROOT WITH NO FUSELAGE EFFECTS
#SECTION
## Xle Yle Zle Chord Ainc [ Nspan Sspace ]
#43.7336 0.0000 -2.16535 16.2402 0.0 19 3

#AFILE
#sc20612-il.dat


CONTROL
# name gain Xhinge VYZhvec SgnDup
Flap 1.00 0.70 0 0 0 1.00


#10%
SECTION
# Xle Yle Zle Chord Ainc           [ Nspan Sspace ]
45.19918 7.14237 -2.2244105 13.975434 4 5 3

AFILE
sc20612-il.dat


CONTROL
# name gain Xhinge VYZhvec SgnDup
Flap 1.00 0.70 0 0 0 1.00


#50%
SECTION
# Xle Yle Zle Chord Ainc [ Nspan Sspace ]
58.663 24.42585 -2.4606325 9.64077 1 3 3
AFILE
sc20612-il.dat


CONTROL
# name gain Xhinge VYZhvec SgnDup
Flap 1.00 0.70 0 0 0 1.00


#TIP CHORD
SECTION
# Xle Yle Zle Chord Ainc [ Nspan Sspace ]
75.4948 46.0302 -2.75591 4.22244 -14 2 3

AFILE
sc20612-il.dat

#==============================================================
#--------------------------HORIZONTAL TAIL---------------------
#==============================================================
SURFACE
Horizontal Tail

# Nchord Cspace [ Nspan Sspace ]
7 1.00 20 2.0


INDEX
6442

YDUPLICATE
0.0

SCALE
1.0 1.0 1.0


ANGLE
2.5

TRANSLATE
0.0 0.0 0.0


#ROOT CHORD WITH 50% HINGE
SECTION
# Xle Yle Zle Chord Ainc [ Nspan Sspace ]
96.919 0.0000 18.2415 7.70997 0.000 7 1
NACA
0012
CLAF
1.1078

CONTROL
# name gain Xhinge VYZhvec SgnDup
Elevator -1.00 0.50 0 1 0 1.00


#TIP CHORD WITH 50% HINGE
SECTION
# Xle Yle Zle Chord Ainc [ Nspan Sspace ]
108.795 12.5984 18.2415 3.16109 0.000 7 1
NACA
0012
CLAF
1.1078

CONTROL
# name gain Xhinge VYZhvec SgnDup
Elevator -1.00 0.50 0 1 0 1.00


#==============================================================
#---------------------------VERTICAL TAIL----------------------
#==============================================================
SURFACE
Vertical Tail

# Nchord Cspace [ Nspan Sspace ]
7 1 10 -2.0


INDEX
6443


SCALE
1.0 1.0 1.0


ANGLE
0.0


TRANSLATE
0.0 0.0 0.0


#ROOT CHORD WITH 50% HINGE
SECTION
# Xle Yle Zle Chord Ainc [ Nspan Sspace ]
86.6496 0.0000 5.8727 11.4829 0.000 7 1
NACA
0012
CLAF
1.1078

CONTROL
# name gain Xhinge VYZhvec SgnDup
Rudder 1.00 0.50 0 0 1 -1.00


#TIP CHORD WITH 50% HINGE
SECTION
# Xle Yle Zle Chord Ainc [ Nspan Sspace ]
97.706 0.0000 19.2257 8.61221 0.000 7 1
NACA
0012
CLAF
1.1078

CONTROL
# name gain Xhinge VYZhvec SgnDup
Rudder 1.00 0.50 0 0 1 -1.00


# #--------------------------------------------------
# SURFACE
# Nacelle
# #Nchordwise  Cspace   Nspanwise  Sspace
# 6            1.0      12          0.0

# COMPONENT
# 1

# YDUPLICATE
# 0.0

# SCALE
# 1.0   0.5  0.5

# TRANSLATE
# 78.021  4.92126  4.10105

# SECTION
# #Xle   Yle    Zle      Chord   Ainc  Nspanwise  Sspace
# 0.00  0.0        3.28084    10.8628   0.    1          0.

# SECTION
# #Xle   Yle    Zle      Chord   Ainc  Nspanwise  Sspace
# 0.00  1.64042    2.84121    10.8628   0.    1          0.

# SECTION
# #Xle   Yle    Zle      Chord   Ainc  Nspanwise  Sspace
# 0.00  2.84121    1.64042    10.8628   0.    1          0.

# SECTION
# #Xle   Yle    Zle      Chord   Ainc  Nspanwise  Sspace
# 0.00  3.28084    0.0        10.8628   0.    1          0.

# SECTION
# #Xle   Yle    Zle      Chord   Ainc  Nspanwise  Sspace
# 0.00  2.84121   -1.64042    10.8628   0.    1          0.

# SECTION
# #Xle   Yle    Zle      Chord   Ainc  Nspanwise  Sspace
# 0.00  1.64042   -2.84121    10.8628   0.    1          0.

# SECTION
# #Xle   Yle    Zle      Chord   Ainc  Nspanwise  Sspace
# 0.00  0.0       -3.28084    10.8628   0.    1          0.

# SECTION
# #Xle   Yle    Zle      Chord   Ainc  Nspanwise  Sspace
# 0.00 -1.64042   -2.84121    10.8628   0.    1          0.

# SECTION
# #Xle   Yle    Zle      Chord   Ainc  Nspanwise  Sspace
# 0.00 -2.84121   -1.64042    10.8628   0.    1          0.

# SECTION
# #Xle   Yle    Zle      Chord   Ainc  Nspanwise  Sspace
# 0.00 -3.28084     0.0       10.8628   0.    1          0.

# SECTION
# #Xle   Yle    Zle      Chord   Ainc  Nspanwise  Sspace
# 0.00 -2.84121     1.6404    10.8628   0.    1          0.

# SECTION
# #Xle   Yle    Zle      Chord   Ainc  Nspanwise  Sspace
# 0.00 -1.64042     2.84121   10.8628   0.    1          0.

# SECTION
# #Xle   Yle    Zle      Chord   Ainc  Nspanwise  Sspace
# 0.00  0.0         3.28084   10.8628   0.    1          0.
