# AERO 481 - Team 2 - jetMaize LLC.
# jetMaize Preliminary Design
# Last Revision: 11/3/17

#==============================================================
#-------------------------GEOMETRY FILE------------------------
#==============================================================
# AVL Conventions
# Imperial Used: ft, lbm, etc.

# Case title
jetMaizeV1

# Mach
0.85

# iYsim iZym Zsym
0 0 0

# Sref Creb Bref
1060.08869 14.63255 92.027559

# Xcg Ycg Zcg
51.44619 0 0

# CDp (optional)
0.0


# #==============================================================
# #---------------------------FUSELAGE---------------------------
# #==============================================================


# BODY
# Fuselage
# 80   1.0

# YDUPLICATE
# 0.0


# SCALE
# 105.17 105.17 105.17

# TRANSLATE
# 0.0  0.0  0.1


# BFILE
# j481fuse.dat


# SURFACE
# HFuselage

# 13 1.00


# YDUPLICATE
# 0.0


# SCALE
# 1.0 1.0 1.0


# ANGLE
# 0


# TRANSLATE
# 0.0 0.0 0.0


# SECTION
# # Xle Yle Zle Chord Ainc [ Nspan Sspace ]
# 3 0 -2.16535 61 0.000 3 3
# NACA
# 0008
# CLAF
# 1.1078


# SECTION
# # Xle Yle Zle Chord Ainc [ Nspan Sspace ]
# 10.9592 2.82152 -2.16535 51.21 0.000 3 3
# NACA
# 0008
# CLAF
# 1.1078


# SURFACE
# VFuselage

# 13 1.00


# SCALE
# 1.0 1.0 1.0


# ANGLE
# 0


# TRANSLATE
# 0.0 0.0 0.0


# SECTION
# # Xle Yle Zle Chord Ainc [ Nspan Sspace ]
# 10 0 -3.16535 51 0.000 3 3
# NACA
# 0008
# CLAF
# 1.1078

# SECTION
# # Xle Yle Zle Chord Ainc [ Nspan Sspace ]
# 0 0 0 83 0.000 3 3
# NACA
# 0008
# CLAF
# 1.1078

# SECTION
# # Xle Yle Zle Chord Ainc [ Nspan Sspace ]
# 10.9592 0 5.8727 91.21 0.000 3 3
# NACA
# 0008
# CLAF
# 1.1078

#==============================================================
#---------------------------MAIN WING--------------------------
#==============================================================
SURFACE
Main Wing

# Nchord Cspace [ Nspan Sspace ]
13 1.00


INDEX
6440


YDUPLICATE
0.0


SCALE
1.0 1.0 1.0


ANGLE
2.500


TRANSLATE
0.0 0.0 0.0


# SECTION
# # Xle Yle Zle Chord Ainc [ Nspan Sspace ]
# 5 0 -2.16535 61 2.00 2 3
# NACA
# 0008
# CLAF
# 1.1078


# SECTION
# # Xle Yle Zle Chord Ainc [ Nspan Sspace ]
# 10.9592 2. -2.16535 51.21 0.00 1 3
# NACA
# 0008
# CLAF
# 1.1078

#WING WITH FUSELAGE EFFECT ACCOUNTED: AFFECTS EFFICIENCY CALCULATIONS
#ROOT CHORD
SECTION
# Xle Yle Zle Chord Ainc [ Nspan Sspace ]
# 41.8333 2.82152 -2.16535 15.0591 3 19 3

# 60.0246 0.0 -2.16535 48.9239 0 19 3
# 56.4423 0.0 -2.16535 34.5945 0 19 3
# 54.8552 0.0 -2.16535 28.2463 0 19 3
# 53.9091 0.0 -2.16535 24.462 0 19 3
# 53.2635 0.0 -2.16535 21.8795 0 19 3
# 52.7869 0.0 -2.16535 19.9731 0 19 3
# 52.4165 0.0 -2.16535 18.4915 0 19 3
 52.118 0.0 -2.16535 17.2972 0 19 3
# 51.8706 0.0 -2.16535 16.308 0 19 3
# 51.6614 0.0 -2.16535 15.4711 0 19 3
# 51.4814 0.0 -2.16535 14.7511 0 19 3
# 51.3244 0.0 -2.16535 14.1231 0 19 3
# 51.1859 0.0 -2.16535 13.5691 0 19 3
# 51.0625 0.0 -2.16535 13.0755 0 19 3
# 50.9517 0.0 -2.16535 12.6321 0 19 3
# 50.8514 0.0 -2.16535 12.231 0 19 3

AFILE
sc20612-il.dat

#TIP CHORD
SECTION
# Xle Yle Zle Chord Ainc [ Nspan Sspace ]
# 75.4948 46.0302 -2.75591 4.22244 -2 19 3

# 80.2724 15.411 -2.75591 12.7202 -2 19 3
# 78.6769 21.7945 -2.75591 8.9945 -2 19 3
# 79.4742 26.6927 -2.75591 7.344 -2 19 3
# 80.8282 30.8221 -2.75591 6.3601 -2 19 3
# 82.348 34.4601 -2.75591 5.6886 -2 19 3
# 83.9084 37.7492 -2.75591 5.193 -2 19 3
# 85.4614 40.7738 -2.75591 4.8078 -2 19 3
 86.9872 43.589 -2.75591 4.4973 -2 19 3
# 88.478 46.2331 -2.75591 4.2401 -2 19 3
# 89.9309 48.734 -2.75591 4.0225 -2 19 3
# 91.3459 51.1126 -2.75591 3.8353 -2 19 3
# 92.724 53.3854 -2.75591 3.672 -2 19 3
# 94.0668 55.5653 -2.75591 3.5279 -2 19 3
# 95.376 57.6628 -2.75591 3.3996 -2 19 3
# 96.6536 59.6867 -2.75591 3.2843 -2 19 3
# 97.9012 61.6441 -2.75591 3.18 -2 19 3

AFILE
sc20612-il.dat
